<?xml version="1.0" encoding="UTF-8"?>
<neuroml xmlns="http://www.neuroml.org/schema/neuroml2"
    xmlns:xsi="http://www.w3.org/2001/XMLSchema-instance"
    xsi:schemaLocation="http://www.neuroml.org/schema/neuroml2  https://raw.github.com/NeuroML/NeuroML2/master/Schemas/NeuroML2/NeuroML_v2beta2.xsd"
    id="SingleCompMuscleCell">

    <include href="ca_boyle.channel.nml"/>
    <include href="k_fast.channel.nml"/>
    <include href="k_slow.channel.nml"/>
    <include href="Leak.channel.nml"/>
    <include href="CaPool.nml"/>

    <baseCellMembPot id="SingleCompMuscleCell" leakReversal="-60mV" thresh="-55mV" reset="-62mV" C="1.0nF" leakConductance="0.05uS">

        <notes>Only muscle cell body...</notes>

        <morphology id="morphology_SingleCompMuscleCell">

            <segment id="0" name="soma">
                <proximal x="0.0" y="0.0" z="0.0" diameter="10"/>
                <distal x="0.0" y="0.0" z="230.3459" diameter="10"/>
            </segment>

        </morphology>

        <biophysicalProperties id="biophys">

            <membraneProperties>

                <channelDensity condDensity="0.0193181 mS_per_cm2" id="Leak_all" ionChannel="Leak" erev="10 mV" ion="non_specific"/>

                <channelDensity condDensity="0.43584 mS_per_cm2" id="k_slow_all" ionChannel="k_slow" erev="-64.3461 mV" ion="k"/>

                <channelDensity condDensity="0.399994 mS_per_cm2" id="k_fast_all" ionChannel="k_fast" erev="-54.9998 mV" ion="k"/>

                <channelDensity condDensity="0.220209 mS_per_cm2" id="ca_boyle_all" ionChannel="ca_boyle" erev="49.11 mV" ion="ca"/>

                <spikeThresh value="0 mV"/>

                <specificCapacitance value="1 uF_per_cm2"/>

                <initMembPotential value="-75 mV"/>

            </membraneProperties>

            <intracellularProperties>

                <species id="ca"
                         ion="ca"
                         concentrationModel="CaPool"
                         initialConcentration="0 mM"
                         initialExtConcentration="2E-6 mol_per_cm3"/>

                <resistivity value="0.1 kohm_cm"/>

            </intracellularProperties>

        </biophysicalProperties>

    </baseCellMembPot>
</neuroml>
